**----------------------------------
**INDENTATION SIMULATION
**----------------------------------
*HEADING
Abapy Indentation Simulation
*PREPRINT, ECHO=NO, MODEL=NO, HISTORY=NO, CONTACT=NO
**----------------------------------
** SAMPLE DEFINITION
*PART, NAME = P_SAMPLE
**----------------------------------
** NODES
**----------------------------------
*Node, NSET=ALLNODES
  1, 0.0, -1.0, 0.0
  2, 0.125, -1.0, 0.0
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**----------------------------------
** NODE SETS
**----------------------------------
*NSET, NSET=CORE_NODES
1,2,3,4,5,6
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*NSET, NSET=ALL_BACK_NODES
2770,2771,2772,2773,2774,2775
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*NSET, NSET=ALL_NODES
1,2,3,4,5,6
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*NSET, NSET=ALL_FRONT_NODES
2,3,4,5,6,7
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*NSET, NSET=REF_NODE
296,
*NSET, NSET=BOTTOM_NODES
296,297,298,324,325,643
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*NSET, NSET=BACK_NODES
2770,2771,2772,2773,2774,2775
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*NSET, NSET=TOP_NODES
73,74,75,76,77,78
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*NSET, NSET=SURFACE_NODES
73,74,75,76,77,78
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*NSET, NSET=AXIS_NODES
1,10,19,28,37,46
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*NSET, NSET=FRONT_NODES
2,3,4,5,6,7
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*NSET, NSET=TIP_NODE
73,
*NSET, NSET=SHELL_NODES
234,235,236,237,238,239
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**----------------------------------
** ELEMENTS
**----------------------------------
*ELEMENT, TYPE=C3D8, ELSET=C3D8_ELEMENTS
  2, 348, 349, 358, 357, 2, 3, 12, 11,
  3, 349, 350, 359, 358, 3, 4, 13, 12,
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*ELEMENT, TYPE=C3D6, ELSET=C3D6_ELEMENTS
  1, 1, 2, 348, 10, 11, 357,
  9, 10, 11, 357, 19, 20, 366,
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**----------------------------------
** ELEMENT SETS
**----------------------------------
*ELSET, ELSET=SURFACE_ELEMENTS
  57, 58, 59, 60, 61, 62
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*ELSET, ELSET=SURFACE_FACES_F5_0
  58, 59, 60, 61, 62, 63
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*ELSET, ELSET=ALL_ELEMENTS
  1, 2, 3, 4, 5, 6
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*ELSET, ELSET=SHELL_ELEMENTS
  2048, 2049, 2050, 2051, 2052, 2053
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*ELSET, ELSET=CORE_ELEMENTS
  1, 2, 3, 4, 5, 6
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*ELSET, ELSET=SURFACE_FACES_F2_0
  577, 837, 1097, 1357, 1617, 1877, 57, 317,
**----------------------------------
** ELEMENT SURFACES
**----------------------------------
*SURFACE, TYPE=ELEMENT, NAME=SURFACE_FACES
 surface_faces_f2_0, S2
 surface_faces_f5_0, S5
*SOLID SECTION, ELSET = ALL_ELEMENTS, MATERIAL = SAMPLE_MAT
*TRANSFORM, TYPE=C, NSET=FRONT_NODES
0., 0., 0., 0., 1.,0.
*TRANSFORM, TYPE=C, NSET=BACK_NODES
0., 0., 0., 0., 1.,0.
*END PART
**----------------------------------
** INDENTER DEFINITION
**----------------------------------
*PART, NAME = P_INDENTER
**----------------------------------
** NODES
**----------------------------------
*Node, NSET=ALLNODES
  1, 0.0, 1.0, 0.0
  2, 0.0907636880875, 1.00368666649, 0.0
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**----------------------------------
** NODE SETS
**----------------------------------
*NSET, NSET=CORE_NODES
1,2,3,4,5,6
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*NSET, NSET=ALL_BACK_NODES
2770,2771,2772,2773,2774,2775
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*NSET, NSET=ALL_NODES
1,2,3,4,5,6
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*NSET, NSET=ALL_FRONT_NODES
2,3,4,5,6,7
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*NSET, NSET=REF_NODE
296,
*NSET, NSET=BOTTOM_NODES
296,297,298,324,325,643
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*NSET, NSET=BACK_NODES
2770,2771,2772,2773,2774,2775
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*NSET, NSET=TOP_NODES
73,74,75,76,77,78
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*NSET, NSET=XSYM_NODES
296,
*NSET, NSET=SURFACE_NODES
73,74,75,76,77,78
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*NSET, NSET=RIGID_NODES
1,2,3,4,5,6
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*NSET, NSET=AXIS_NODES
1,10,19,28,37,46
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*NSET, NSET=FRONT_NODES
2,3,4,5,6,7
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*NSET, NSET=TIP_NODE
73,
*NSET, NSET=SHELL_NODES
234,235,236,237,238,239
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**----------------------------------
** ELEMENTS
**----------------------------------
*ELEMENT, TYPE=C3D8, ELSET=C3D8_ELEMENTS
  2, 357, 358, 349, 348, 11, 12, 3, 2,
  3, 358, 359, 350, 349, 12, 13, 4, 3,
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*ELEMENT, TYPE=C3D6, ELSET=C3D6_ELEMENTS
  1, 10, 11, 357, 1, 2, 348,
  9, 19, 20, 366, 10, 11, 357,
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**----------------------------------
** ELEMENT SETS
**----------------------------------
*ELSET, ELSET=SURFACE_FACES_F3_0
  58, 59, 60, 61, 62, 63
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*ELSET, ELSET=SURFACE_ELEMENTS
  57, 58, 59, 60, 61, 62
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*ELSET, ELSET=SURFACE_FACES_F1_0
  577, 837, 1097, 1357, 1617, 1877, 57, 317,
*ELSET, ELSET=ALL_ELEMENTS
  1, 2, 3, 4, 5, 6
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*ELSET, ELSET=SHELL_ELEMENTS
  2048, 2049, 2050, 2051, 2052, 2053
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*ELSET, ELSET=CORE_ELEMENTS
  1, 2, 3, 4, 5, 6
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**----------------------------------
** ELEMENT SURFACES
**----------------------------------
*SURFACE, TYPE=ELEMENT, NAME=SURFACE_FACES
 surface_faces_f1_0, S1
 surface_faces_f3_0, S3
**----------------------------------
** CSYS CHANGE TO CYLINDRICAL
**----------------------------------
*TRANSFORM, TYPE=C, NSET=FRONT_NODES
 0., 0., 0., 0., 1.,0.
*TRANSFORM, TYPE=C, NSET=BACK_NODES
 0., 0., 0., 0., 1.,0.
**----------------------------------
** SOLID SECTION
**----------------------------------
*SOLID SECTION, ELSET = ALL_ELEMENTS, MATERIAL = INDENTER_MAT
**----------------------------------
** RIGID BODY
**----------------------------------
*RIGID BODY, REF NODE = REF_NODE, PIN NSET=RIGID_NODES
*END PART
**----------------------------------
** ASSEMBLY
**----------------------------------
*ASSEMBLY, NAME = ASSEMBLY
*INSTANCE, NAME = I_SAMPLE, PART = P_SAMPLE
*END INSTANCE
*INSTANCE, NAME = I_INDENTER, PART= P_INDENTER
*END INSTANCE
*END ASSEMBLY
**----------------------------------
** SURFACE INTERACTIONS
**----------------------------------
*SURFACE INTERACTION, NAME = SURF_INT
*FRICTION
0.0,
*SURFACE BEHAVIOR, PRESSURE-OVERCLOSURE = HARD
*CONTACT PAIR, INTERACTION = SURF_INT, SUPPLEMENTARY CONSTRAINTS = NO, TYPE= NODE TO SURFACE
I_SAMPLE.SURFACE_FACES, I_INDENTER.SURFACE_FACES
**----------------------------------
** MATERIALS
**----------------------------------
** SAMPLE MATERIAL
** <VonMises instance: 1 samples>
*MATERIAL, NAME=SAMPLE_MAT
*ELASTIC
  1.0, 0.3
*PLASTIC
  0.01, 0.
** INDENTER MATERIAL
** <Elastic instance: 1 samples>
*MATERIAL, NAME=INDENTER_MAT
*ELASTIC
  1.0, 0.3
**----------------------------------
** STEPS
**----------------------------------
*STEP, NAME = PRELOADING, NLGEOM = YES, INC=1000000
*STATIC, DIRECT
0.01, 1.
*BOUNDARY
I_SAMPLE.AXIS_NODES, 1, 1
I_SAMPLE.BOTTOM_NODES, 1, 3
I_SAMPLE.FRONT_NODES, 2, 2
I_SAMPLE.BACK_NODES, 2, 2
I_SAMPLE.AXIS_NODES, 3, 3
I_INDENTER.REF_NODE, 3, 6
I_INDENTER.XSYM_NODES, 1, 1
I_INDENTER.XSYM_NODES, 3, 3
I_INDENTER.REF_NODE, 4, 6
I_INDENTER.REF_NODE, 2, 2, -0.214393132828
*RESTART, WRITE, FREQUENCY = 0
*OUTPUT, FIELD, FREQUENCY = 999999
*NODE OUTPUT
COORD, U,
*NODE OUTPUT, NSET=I_INDENTER.REF_NODE
U
*ELEMENT OUTPUT, ELSET=I_SAMPLE.ALL_ELEMENTS, DIRECTIONS = YES
LE, EE, PE, PEEQ, S,
*ELEMENT OUTPUT, ELSET=I_INDENTER.ALL_ELEMENTS, DIRECTIONS = YES
LE, EE, PE, PEEQ, S,
*OUTPUT, HISTORY
*ENERGY OUTPUT
ALLFD, ALLWK
*ENERGY OUTPUT, ELSET=I_SAMPLE.ALL_ELEMENTS
ALLPD
*ENERGY OUTPUT, ELSET=I_SAMPLE.ALL_ELEMENTS
ALLSE
*ENERGY OUTPUT, ELSET=I_INDENTER.ALL_ELEMENTS
ALLSE
*CONTACT OUTPUT, NSET=I_SAMPLE.TOP_NODES
CPRESS
*NODE OUTPUT, NSET=I_INDENTER.REF_NODE
U2
*NODE OUTPUT, NSET=I_INDENTER.TIP_NODE
U2
*NODE OUTPUT, NSET=I_INDENTER.REF_NODE
RF2
*NODE OUTPUT, NSET = I_SAMPLE.TOP_NODES
COOR1, COOR2, COOR3
*END STEP
*STEP, NAME = LOADING, NLGEOM = YES, INC=1000000
*STATIC, DIRECT
0.01, 1.
*BOUNDARY
I_SAMPLE.AXIS_NODES, 1, 1
I_SAMPLE.BOTTOM_NODES, 1, 3
I_SAMPLE.FRONT_NODES, 2, 2
I_SAMPLE.BACK_NODES, 2, 2
I_SAMPLE.AXIS_NODES, 3, 3
I_INDENTER.REF_NODE, 3, 6
I_INDENTER.XSYM_NODES, 1, 1
I_INDENTER.XSYM_NODES, 3, 3
I_INDENTER.REF_NODE, 4, 6
I_INDENTER.REF_NODE, 2, 2, -0.428786265656
*RESTART, WRITE, FREQUENCY = 0
*OUTPUT, FIELD, FREQUENCY = 999999
*NODE OUTPUT
COORD, U,
*NODE OUTPUT, NSET=I_INDENTER.REF_NODE
U
*ELEMENT OUTPUT, ELSET=I_SAMPLE.ALL_ELEMENTS, DIRECTIONS = YES
LE, EE, PE, PEEQ, S,
*ELEMENT OUTPUT, ELSET=I_INDENTER.ALL_ELEMENTS, DIRECTIONS = YES
LE, EE, PE, PEEQ, S,
*OUTPUT, HISTORY
*ENERGY OUTPUT
ALLFD, ALLWK
*ENERGY OUTPUT, ELSET=I_SAMPLE.ALL_ELEMENTS
ALLPD
*ENERGY OUTPUT, ELSET=I_SAMPLE.ALL_ELEMENTS
ALLSE
*ENERGY OUTPUT, ELSET=I_INDENTER.ALL_ELEMENTS
ALLSE
*CONTACT OUTPUT, NSET=I_SAMPLE.TOP_NODES
CPRESS
*NODE OUTPUT, NSET=I_INDENTER.REF_NODE
U2
*NODE OUTPUT, NSET=I_INDENTER.TIP_NODE
U2
*NODE OUTPUT, NSET=I_INDENTER.REF_NODE
RF2
*NODE OUTPUT, NSET = I_SAMPLE.TOP_NODES
COOR1, COOR2, COOR3
*END STEP
*STEP, NAME = UNLOADING, NLGEOM = YES, INC=1000000
*STATIC, DIRECT
0.005, 1.
*BOUNDARY
I_SAMPLE.AXIS_NODES, 1, 1
I_SAMPLE.BOTTOM_NODES, 1, 3
I_SAMPLE.FRONT_NODES, 2, 2
I_SAMPLE.BACK_NODES, 2, 2
I_SAMPLE.AXIS_NODES, 3, 3
I_INDENTER.REF_NODE, 3, 6
I_INDENTER.XSYM_NODES, 1, 1
I_INDENTER.XSYM_NODES, 3, 3
I_INDENTER.REF_NODE, 4, 6
I_INDENTER.REF_NODE, 2, 2, -0.0
*RESTART, WRITE, FREQUENCY = 0
*OUTPUT, FIELD, FREQUENCY = 999999
*NODE OUTPUT
COORD, U,
*NODE OUTPUT, NSET=I_INDENTER.REF_NODE
U
*ELEMENT OUTPUT, ELSET=I_SAMPLE.ALL_ELEMENTS, DIRECTIONS = YES
LE, EE, PE, PEEQ, S,
*ELEMENT OUTPUT, ELSET=I_INDENTER.ALL_ELEMENTS, DIRECTIONS = YES
LE, EE, PE, PEEQ, S,
*OUTPUT, HISTORY
*ENERGY OUTPUT
ALLFD, ALLWK
*ENERGY OUTPUT, ELSET=I_SAMPLE.ALL_ELEMENTS
ALLPD
*ENERGY OUTPUT, ELSET=I_SAMPLE.ALL_ELEMENTS
ALLSE
*ENERGY OUTPUT, ELSET=I_INDENTER.ALL_ELEMENTS
ALLSE
*CONTACT OUTPUT, NSET=I_SAMPLE.TOP_NODES
CPRESS
*NODE OUTPUT, NSET=I_INDENTER.REF_NODE
U2
*NODE OUTPUT, NSET=I_INDENTER.TIP_NODE
U2
*NODE OUTPUT, NSET=I_INDENTER.REF_NODE
RF2
*NODE OUTPUT, NSET = I_SAMPLE.TOP_NODES
COOR1, COOR2, COOR3
*END STEP
